# OpenSim document version 40600
MocoStudy sliding_mass:
  MocoProblem problem:
    MocoPhase phases:
      ModelProcessor model:
        model: Model sliding_mass:
          gravity: 0 0 0
          Body: mass=2 [kg] mass_center=(0 0 0) inertia=(0 0 0 0 0 0)
            Sphere body_geom_1: radius=0.05
          SliderJoint slider: socket_parent_frame=/ground socket_child_frame=/body
            Coordinate position
          CoordinateActuator actuator: coordinate=position optimal_force=1
          Ground
      MocoInitialBounds time_initial_bounds: bounds=0
      MocoFinalBounds time_final_bounds: bounds=(0 5)
      state_infos:
        MocoVariableInfo /slider/position/value: bounds=(-5 5) initial_bounds=0 final_bounds=1
        MocoVariableInfo /slider/position/speed: bounds=(-50 50) initial_bounds=0 final_bounds=0
      control_infos: MocoVariableInfo /actuator: bounds=(-50 50)
      goals: MocoFinalTimeGoal goal
  MocoCasADiSolver solver:
    num_mesh_intervals: 100
